*Heading
 Cantilever beam tutorial
** Job name: beam_tutorial Model name: Beam
** Generated by: Abaqus/CAE 6.12-1
*Preprint, echo=NO, model=NO, history=NO, contact=NO
**
** PARTS
**
*Part, name=Beam
*End Part
**
**
** ASSEMBLY
**
*Assembly, name=Assembly
**
*Instance, name=beamInstance, part=Beam
*Node
      1,        -100.,         -10.,          25.
      2,        -100.,           0.,          25.
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*Element, type=C3D8I
  1,  13,  14,  17,  16,   1,   2,   5,   4
  2,  14,  15,  18,  17,   2,   3,   6,   5
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*Nset, nset=_G2, internal, generate
   1,  252,    1
*Elset, elset=_G2, internal, generate
   1,  120,    1
** Section: beamSection
*Solid Section, elset=_G2, material=Steel
1.,
*End Instance
**
*Nset, nset=_G3, internal, instance=beamInstance, generate
  1,  12,   1
*Elset, elset=_G3, internal, instance=beamInstance, generate
 1,  6,  1
*Elset, elset=__G4_S4, internal, instance=beamInstance, generate
   2,  120,    2
*Surface, type=ELEMENT, name=_G4, internal
__G4_S4, S4
*End Assembly
**
** MATERIALS
**
*Material, name=Steel
*Elastic
209000., 0.3
** ----------------------------------------------------------------
**
** STEP: beamLoad
**
*Step, name=beamLoad
Load the top of the beam.
*Static
0.1, 1., 1e-05, 1.
**
** BOUNDARY CONDITIONS
**
** Name: Fixed Type: Symmetry/Antisymmetry/Encastre
*Boundary
_G3, ENCASTRE
**
** LOADS
**
** Name: Pressure   Type: Pressure
*Dsload
_G4, P, 0.5
**
** OUTPUT REQUESTS
**
*Restart, write, frequency=0
**
** FIELD OUTPUT: F-Output-1
**
*Output, field, variable=PRESELECT
**
** HISTORY OUTPUT: H-Output-1
**
*Output, history, variable=PRESELECT
*End Step
